// SBML level 3 version 1

model main()
  // model units - substance: mole, time: second, extent: mole

  // Compartments:
  compartment c1 = 1 litre;
  compartment body = 1 litre;

  // Species:
  species A_depot in body = 0.0003/body;
  species A_hepatic in body = 0;
  species A_central in body = 0;
  species A_peripheral in body = 0;
  species A_central_H4 in body = 0;
  species A_central_carboxylic_acid in body = 0;
  species A_peripheral_carboxylic_acid in body = 0;

  // Parameters:
  V_hepatic = 1.46392 per_second;
  V_central = 1.46392 per_second;
  V_peripheral = 2.82398 per_second;
  V_central_H4 = 0.05145 per_second;
  V_central_carboxylic_acid = 0.01734 per_second;
  V_peripheral_carboxylic_acid = 0.05189 per_second;
  ka = 0.005455556 per_second;
  Tlag = 705.6 per_second;
  CL_Qc = 0.0002349167 per_second;
  CL_Qp = 0.0001633139 per_second;
  CL_Qm2 = 1.243333e-6 per_second;
  CL_Qhm1 = 0.000308575 per_second;
  CL_Qhm2 = 0.002160033 per_second;
  CLel_CLm11 = 0.0001028583 per_second;
  CLel_CLm1 = 2.0625e-5 per_second;
  CLel_CLm2 = 2.013333e-6 per_second;

  // Reactions:
  absorption: A_depot => A_hepatic; piecewise(0, time < Tlag, ka*A_depot);
  transfer_Qc: A_hepatic => A_central; CL_Qc*(A_hepatic/V_hepatic - A_central/V_central);
  transfer_Qp: A_central => A_peripheral; CL_Qp*(A_central/V_central - A_peripheral/V_peripheral);
  transfer_Qm2: A_central_carboxylic_acid => A_peripheral_carboxylic_acid; CL_Qm2*(A_central_carboxylic_acid/V_central_carboxylic_acid - A_peripheral_carboxylic_acid/V_peripheral_carboxylic_acid);
  formation_Qhm1: A_hepatic => A_central_H4; CL_Qhm1*A_hepatic/V_hepatic;
  formation_Qhm2: A_hepatic => A_central_carboxylic_acid; CL_Qhm2*A_hepatic/V_hepatic;
  elim_CLm11: A_hepatic => ; CLel_CLm11*A_hepatic/V_hepatic;
  elim_CLm1: A_central_H4 => ; CLel_CLm1*A_central_H4/V_central_H4;
  elim_CLm2: A_central_carboxylic_acid => ; CLel_CLm2*A_central_carboxylic_acid/V_central_carboxylic_acid;

  // Unit definitions:
  unit per_second = 1 / second;
end
